// SBML level 3 version 2

model biocrnpyler_494930()
  // model units - substance: mole, time: second, volume: litre, area: square_metre, length: metre, extent: mole

  // Compartments:
  compartment default = 1e-6;

  // Species:
  species dna_G in default = 10;
  species rna_T in default = 0;
  species protein_X in default = 0;

  // Parameters:
  ktx_medium_simple_transcription = 0.2221875;
  ktl_medium_simple_translation = 0.075;

  // Reactions:
  r0: dna_G => dna_G + rna_T; ktx_medium_simple_transcription*dna_G;
  r1: rna_T => rna_T + protein_X; ktl_medium_simple_translation*rna_T;

  // Unit definitions:
  unit square_metre = metre^2;
end
