// SBML level 3 version 2

model biocrnpyler_319981()
  // model units - substance: mole, time: second, volume: litre, area: square_metre, length: metre, extent: mole

  // Compartments:
  compartment default = 1e-6;

  // Species:
  species dna_G in default = 1;
  species rna_T in default = 0;
  species protein_X in default = 0;
  species protein_RNAase in default = 45;
  species complex_protein_RNAase_rna_T_ in default = 0;

  // Parameters:
  ktx_medium_simple_transcription = 0.2221875;
  ktl_medium_simple_translation = 0.075;
  kb__ = 100;
  ku__ = 10;
  kdeg__rna_degredation_mm = 0.001;

  // Reactions:
  r0: dna_G => dna_G + rna_T; ktx_medium_simple_transcription*dna_G;
  r1: rna_T => rna_T + protein_X; ktl_medium_simple_translation*rna_T;
  r2: rna_T + protein_RNAase => complex_protein_RNAase_rna_T_; kb__*rna_T*protein_RNAase;
  r2rev: complex_protein_RNAase_rna_T_ => rna_T + protein_RNAase; ku__*complex_protein_RNAase_rna_T_;
  r3: complex_protein_RNAase_rna_T_ => protein_RNAase; kdeg__rna_degredation_mm*complex_protein_RNAase_rna_T_;

  // Unit definitions:
  unit square_metre = metre^2;
end
