// SBML level 3 version 2

model biocrnpyler_449700()
  // model units - substance: mole, time: second, volume: litre, area: square_metre, length: metre, extent: mole

  // Compartments:
  compartment default = 1e-6;

  // Species:
  species dna_G1 in default = 1;
  species rna_T1 in default = 0;
  species protein_X in default = 0;
  species dna_G2 in default = 0.2;
  species rna_T2 in default = 0;

  // Parameters:
  ktx_medium_simple_transcription = 0.2221875;
  ktl_medium_simple_translation = 0.075;
  ktx_strong_simple_transcription = 0.4775625;
  ktl_weak_simple_translation = 0.06;

  // Reactions:
  r0: dna_G1 => dna_G1 + rna_T1; ktx_medium_simple_transcription*dna_G1;
  r1: rna_T1 => rna_T1 + protein_X; ktl_medium_simple_translation*rna_T1;
  r2: dna_G2 => dna_G2 + rna_T2; ktx_strong_simple_transcription*dna_G2;
  r3: rna_T2 => rna_T2 + protein_X; ktl_weak_simple_translation*rna_T2;

  // Unit definitions:
  unit square_metre = metre^2;
end
