// SBML level 3 version 2

model biocrnpyler_749186()
  // model units - substance: mole, time: second, volume: litre, area: square_metre, length: metre, extent: mole

  // Compartments:
  compartment default = 1e-6;

  // Species:
  species dna_G in default = 10;
  species rna_T in default = 0;
  species complex_protein_Ribo_rna_T_open_ in default = 0;
  species complex_protein_Ribo_2x_rna_T_open_ in default = 0;
  species complex_protein_Ribo_3x_rna_T_open_ in default = 0;
  species complex_protein_Ribo_rna_T_closed_ in default = 0;
  species complex_protein_Ribo_2x_rna_T_closed_ in default = 0;
  species complex_protein_Ribo_3x_rna_T_closed_ in default = 0;
  species protein_Ribo in default = 150;
  species protein_X in default = 0;

  // Parameters:
  ktx_medium_simple_transcription = 0.2221875;
  kb__ = 100;
  ku_medium_ = 10;
  k_iso__multi_tl = 10;
  ktl__ = 0.05;

  // Reactions:
  r0: dna_G => dna_G + rna_T; ktx_medium_simple_transcription*dna_G;
  r1: rna_T + protein_Ribo => complex_protein_Ribo_rna_T_closed_; kb__*rna_T*protein_Ribo;
  r1rev: complex_protein_Ribo_rna_T_closed_ => rna_T + protein_Ribo; ku_medium_*complex_protein_Ribo_rna_T_closed_;
  r2: complex_protein_Ribo_rna_T_closed_ => complex_protein_Ribo_rna_T_open_; k_iso__multi_tl*complex_protein_Ribo_rna_T_closed_;
  r3: complex_protein_Ribo_2x_rna_T_closed_ => complex_protein_Ribo_2x_rna_T_open_; k_iso__multi_tl*complex_protein_Ribo_2x_rna_T_closed_;
  r4: complex_protein_Ribo_3x_rna_T_closed_ => complex_protein_Ribo_3x_rna_T_open_; k_iso__multi_tl*complex_protein_Ribo_3x_rna_T_closed_;
  r5: protein_Ribo + complex_protein_Ribo_rna_T_open_ => complex_protein_Ribo_2x_rna_T_closed_; kb__*protein_Ribo*complex_protein_Ribo_rna_T_open_;
  r5rev: complex_protein_Ribo_2x_rna_T_closed_ => protein_Ribo + complex_protein_Ribo_rna_T_open_; ku_medium_*complex_protein_Ribo_2x_rna_T_closed_;
  r6: protein_Ribo + complex_protein_Ribo_2x_rna_T_open_ => complex_protein_Ribo_3x_rna_T_closed_; kb__*protein_Ribo*complex_protein_Ribo_2x_rna_T_open_;
  r6rev: complex_protein_Ribo_3x_rna_T_closed_ => protein_Ribo + complex_protein_Ribo_2x_rna_T_open_; ku_medium_*complex_protein_Ribo_3x_rna_T_closed_;
  r7: complex_protein_Ribo_rna_T_open_ => protein_Ribo + protein_X + rna_T; ktl__*complex_protein_Ribo_rna_T_open_;
  r8: complex_protein_Ribo_2x_rna_T_open_ => 2 protein_Ribo + 2 protein_X + rna_T; ktl__*complex_protein_Ribo_2x_rna_T_open_;
  r9: complex_protein_Ribo_3x_rna_T_open_ => 3 protein_Ribo + 3 protein_X + rna_T; ktl__*complex_protein_Ribo_3x_rna_T_open_;
  r10: complex_protein_Ribo_2x_rna_T_closed_ => protein_Ribo + protein_X + complex_protein_Ribo_rna_T_closed_; ktl__*complex_protein_Ribo_2x_rna_T_closed_;
  r11: complex_protein_Ribo_3x_rna_T_closed_ => 2 protein_Ribo + 2 protein_X + complex_protein_Ribo_rna_T_closed_; ktl__*complex_protein_Ribo_3x_rna_T_closed_;

  // Unit definitions:
  unit square_metre = metre^2;
end
