// SBML level 3 version 2

model biocrnpyler_930404()
  // model units - substance: mole, time: second, volume: litre, area: square_metre, length: metre, extent: mole

  // Compartments:
  compartment default = 1e-6;

  // Species:
  species rna_T in default = 10;
  species protein_RNAase in default = 45;
  species complex_protein_RNAase_rna_T_ in default = 0;

  // Parameters:
  kb__ = 100;
  ku__ = 10;
  kdeg__rna_degredation_mm = 0.001;

  // Reactions:
  r0: rna_T + protein_RNAase => complex_protein_RNAase_rna_T_; kb__*rna_T*protein_RNAase;
  r0rev: complex_protein_RNAase_rna_T_ => rna_T + protein_RNAase; ku__*complex_protein_RNAase_rna_T_;
  r1: complex_protein_RNAase_rna_T_ => protein_RNAase; kdeg__rna_degredation_mm*complex_protein_RNAase_rna_T_;

  // Unit definitions:
  unit square_metre = metre^2;
end
