// SBML level 3 version 2

model biocrnpyler_31504()
  // model units - substance: mole, time: second, volume: litre, area: square_metre, length: metre, extent: mole

  // Compartments:
  compartment default = 1e-6;

  // Species:
  species G in default = 0;
  species T in default = 0;
  species P in default = 0;
  species complex_G_P_ in default = 0;

  // Reactions:
  r0: G + P => complex_G_P_; r0_k_forward*G*P;
    r0_k_forward = 10;
  r0rev: complex_G_P_ => G + P; k_reverse*complex_G_P_;
    k_reverse = 100;
  r1: complex_G_P_ => T + G + P; r1_k_forward*complex_G_P_;
    r1_k_forward = 0.15;

  // Unit definitions:
  unit square_metre = metre^2;
end
