// SBML level 3 version 2

model biocrnpyler_649562()
  // model units - substance: mole, time: second, volume: litre, area: square_metre, length: metre, extent: mole

  // Compartments:
  compartment default = 1e-6;

  // Species:
  species T in default = 0;
  species R in default = 0;
  species complex_R_T_ in default = 0;
  species X in default = 0;

  // Reactions:
  r0: T + R => complex_R_T_; r0_k_forward*T*R;
    r0_k_forward = 100;
  r0rev: complex_R_T_ => T + R; k_reverse*complex_R_T_;
    k_reverse = 10;
  r1: complex_R_T_ => T + R + X; r1_k_forward*complex_R_T_;
    r1_k_forward = 0.15;
  r2: T => ; r2_k_forward*T;
    r2_k_forward = 0.05;
  r3: X => ; r3_k_forward*X;
    r3_k_forward = 0.05;

  // Unit definitions:
  unit square_metre = metre^2;
end
