// SBML level 3 version 2

model bioscrape_generated_model_417146()
  // model units - substance: mole, time: second, volume: litre, area: square_metre, length: metre, extent: mole

  // Compartments:
  compartment default = 1e-6;

  // Species:
  species G in default = 1;
  species P in default = 8.064021;
  species R in default = 100;
  species T in default = 0.4435212;

  // Parameters:
  DummyVar_PositiveProportionalHillPropensity_n_0 = 1;
  K = 10;
  delta = 0.001;
  k_tl = 0.1;
  k_tx = 0.05;

  // Reactions:
  r0: G => G + T; G*k_tx;
  r1: T => T + P; G^n*R*k_tl/(G^DummyVar_PositiveProportionalHillPropensity_n_0 + K);  // modifiers: G, R
  r2: T => ; T*delta;
  r3: P => ; P*delta;

  // Unit definitions:
  unit square_metre = metre^2;
end
